*Heading
** Job name: cut_cube Model name: Model-1
*Preprint, echo=NO, model=NO, history=NO, contact=NO
**
** PARTS
**
*Part, name=Cut_cube
*End Part
**
**
** ASSEMBLY
**
*Assembly, name=Assembly
**
*Instance, name=Cut_cube-1, part=Cut_cube
*Node
      1,           5.,           5.,           5.
      2,           5.,          10.,           5.
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*Element, type=C3D10M
  1,  136,  137,  138,  139,  200,  199,  198,  202,  201,  203
  2,  136,  140,  141,  142,  206,  205,  204,  208,  207,  209
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*Nset, nset=_PickedSet2, internal, generate
    1,  1246,     1
*Elset, elset=_PickedSet2, internal, generate
   1,  720,    1
** Region: (Section-1:Picked)
*Elset, elset=_PickedSet2, internal, generate
   1,  720,    1
** Section: Section-1
*Solid Section, elset=_PickedSet2, material=Material-1
1.,
*End Instance
**
*Nset, nset=_PickedSet13, internal, instance=Cut_cube-1
    9,   12,   15,   16,   38,   39
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*Elset, elset=_PickedSet13, internal, instance=Cut_cube-1
  23,  73, 123, 237, 283, 291
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*Nset, nset=_PickedSet14, internal, instance=Cut_cube-1
 12,
*Nset, nset=_PickedSet15, internal, instance=Cut_cube-1
 15,
*Elset, elset=__PickedSurf16_S3, internal, instance=Cut_cube-1
 102, 104, 111, 133, 152, 172
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*Elset, elset=__PickedSurf16_S4, internal, instance=Cut_cube-1
 275, 423, 588, 595
*Elset, elset=__PickedSurf16_S1, internal, instance=Cut_cube-1
 468,
*Elset, elset=__PickedSurf16_S2, internal, instance=Cut_cube-1
 603,
*Surface, type=ELEMENT, name=_PickedSurf16, internal
__PickedSurf16_S3, S3
__PickedSurf16_S4, S4
__PickedSurf16_S2, S2
__PickedSurf16_S1, S1
*End Assembly
**
** MATERIALS
**
*Material, name=Material-1
*Elastic
29000., 0.3
**
** BOUNDARY CONDITIONS
**
** Name: xyz_point Type: Displacement/Rotation
*Boundary
_PickedSet14, 1, 1
_PickedSet14, 2, 2
_PickedSet14, 3, 3
** Name: y_surface Type: Displacement/Rotation
*Boundary
_PickedSet13, 2, 2
** Name: z_point Type: Displacement/Rotation
*Boundary
_PickedSet15, 3, 3
** ----------------------------------------------------------------
**
** STEP: Step-1
**
*Step, name=Step-1
*Static
1., 1., 1e-05, 1.
**
** LOADS
**
** Name: Pull_y   Type: Surface traction
*Dsload
_PickedSurf16, TRVEC, 1., 0., 1., 0.
**
** OUTPUT REQUESTS
**
*Restart, write, frequency=0
**
** FIELD OUTPUT: F-Output-1
**
*Output, field, variable=PRESELECT
**
** HISTORY OUTPUT: H-Output-1
**
*Output, history, variable=PRESELECT
*End Step
