*Heading
** Job name: Local Model name: Local
*Preprint, echo=NO, model=NO, history=NO, contact=NO
**
** PARTS
**
*Part, name=small_cube
*End Part
**
**
** ASSEMBLY
**
*Assembly, name=Assembly
**
*Instance, name=small_cube-1, part=small_cube
*Node
      1,          10.,          10.,           5.
      2,          10.,           5.,           5.
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*Element, type=C3D10M
  1,  62,  56,   1,  28,  81,  80,  79,  83,  82,  84
  2,  63,  50,  64,  65,  87,  86,  85,  89,  88,  90
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*End Instance
**
*End Assembly
**
** MATERIALS
**
*Material, name=Material-1
*Elastic
29000., 0.3
